// COMSOL Multiphysics 6.1.0.252 model "圆形孔口应力_圆环.mph"
// Outline of the model tree

Parameters
  R = 0.5
  r = 0.1
  E = 10.0
  possion = 0.30
  A = 1
  B = 5

Functions
  an1: Analytic "解析 1" | funcname = fx; expr = B*(x/R) + A*(y/R)*(x/R); args = {x, y}; argunit = {m, m}
  an2: Analytic "解析 2" | funcname = fy; expr = B*(y/R) + A*(y/R)*(y/R); args = y; argunit = m

Geometry
  geom1 "几何 1" (2D, length unit m)
    ca1: CircularArc "圆弧 1" | r = R; point1 = {0.5, 0}; point2 = {0, 0.5}
    ca2: CircularArc "圆弧 2" | r = r; point1 = {0.1, 0}; point2 = {0, 0.1}
    ls1: LineSegment "线段 1" | vertex1 = ca2(1) points 1; vertex2 = ca1(1) points 1
    ls2: LineSegment "线段 2" | vertex1 = ca2(1) points 2; vertex2 = ca1(1) points 2
    csol1: ConvertToSolid "转换为实体 1" | input = ca1, ca2, ls1, ls2
    fin: Finalize "形成联合体"

Physics
  solid: SolidMechanics "固体力学" on all domains
    dependent variable u = {u, v, w}
    Type2D.Type2D = PlaneStress
    lemm1: LinearElasticModel "线弹性材料 1" (default)
      E_mat = userdef
      E = E
      nu_mat = userdef
      nu = possion
      rho_mat = userdef
      rho = 1
    free1: Free "自由 1" (default)
    init1: init "初始值 1" (default)
    roll1: Roller "辊支承 1" on boundaries 2
    roll2: Roller "辊支承 2" on boundaries 1
    bndl1: BoundaryLoad "边界载荷 1" on boundaries 4 | FperArea = {fx(x,y), fy(y), 0}

Mesh
  mesh1 "网格 1" (physics-controlled)

Studies
  std1 "研究 1"
    stat: Stationary "稳态"

Solver configurations
  sol1 "解 1" (study std1)
    v1: Variables "因变量 1"
    s1: Stationary "稳态求解器 1"
      dDef: Direct "直接"
      fc1: FullyCoupled "全耦合 1" | linsolver = dDef

Datasets
  dset1: Solution | solution = sol1

Plots
  pg1: PlotGroup2D "应力 (solid)" | data = dset1
    surf1: Surface "表面 1" | expr = solid.mises
      def: Deform "变形" | expr = {u, v}; descr = 位移场
  pg2: PlotGroup2D "二维绘图组 2" | data = dset1
    surf1: Surface "表面 1" | data = dset1; expr = u; descr = 位移场，X 分量
  pg3: PlotGroup2D "二维绘图组 3" | data = dset1
    surf1: Surface "表面 1" | data = dset1; expr = v; descr = 位移场，Y 分量
  pg4: PlotGroup2D "二维绘图组 4" | data = dset1
    surf1: Surface "表面 1" | data = dset1; expr = solid.disp; descr = 位移大小
  pg5: PlotGroup2D "二维绘图组 5" | data = dset1
    surf1: Surface "表面 1" | data = dset1; expr = solid.sxx; descr = 应力张量，xx 分量
  pg6: PlotGroup2D "二维绘图组 6" | data = dset1
    surf1: Surface "表面 1" | data = dset1; expr = solid.syy; descr = 应力张量，yy 分量
  pg7: PlotGroup2D "二维绘图组 7" | data = dset1
    surf1: Surface "表面 1" | data = dset1; expr = solid.sxy; descr = 应力张量，xy 分量
  pg8: PlotGroup2D "二维绘图组 8" | data = dset1
    surf1: Surface "表面 1" | data = dset1; expr = solid.mises; descr = von Mises 应力

Exports
  data1: Data "数据 1"
    data = dset1
    expr = solid.CXY
    unit = 1
    descr = 柯西-格林张量，XY 分量
    filename = E:\BX\小论文\LBPINN\第一次修改\回复\稳定性分析\Stress\Uxy.txt
    location = file
    coordfilename = E:\BX\小论文\LBPINN\第一次修改\回复\稳定性分析\Stress\coordinates.txt