// COMSOL Multiphysics 6.1.0.252 model "电热.mph"
// Outline of the model tree

Parameters
  L = 1
  sigma = 1
  k = 1/500

Geometry
  geom1 "几何 1" (2D, length unit m)
    sq1: Square "正方形 1" | base = center
    fin: Finalize "形成联合体"
  part1 "零件 1" (2D, length unit m)

Physics
  ec: ConductiveMedia "电流" on all domains
    dependent variable V
    d.d = 1[m]
    cucn1: CurrentConservation "电流守恒 1" (default)
      sigma_mat = userdef
      sigma = sigma
      ConstitutiveRelationDE = RelativePermittivity
      epsilonr_mat = userdef
      epsilonr = 1
    ein1: ElectricInsulation "电绝缘 1" (default)
    init1: init "初始值 1" (default)
    pot1: ElectricPotential "电势 1" on boundaries 3 | V0 = 1
    gnd1: Ground "接地 1" on boundaries 2
  ht: HeatTransfer "固体传热" on all domains
    dependent variable T
    PhysicalModelProperty.dz = 1[m]
    PhysicalModelProperty.Tref = 273[K]
    solid1: SolidHeatTransferModel "固体 1" (default)
      k_mat = userdef
      k = k
      rho_mat = userdef
      rho = 1
      Cp_mat = userdef
      Cp = 1
    init1: init "初始值 1" (default) | Tinit = 273[K]
    ins1: ThermalInsulation "热绝缘 1" (default)
    temp1: TemperatureBoundary "温度 1" on boundaries 1-4 | T0 = 273[K]

Multiphysics
  emh1: ElectromagneticHeating "电磁热 1" on all domains | EMHeat_physics = ec; Heat_physics = ht

Mesh
  mesh1 "网格 1"
    size: MeshSizeDefault "大小" | hauto = 4
    fq1: FreeQuad "自由四边形网格 1" on remaining entities

Studies
  std1 "研究 1"
    stat: Stationary "稳态"

Solver configurations
  sol1 "解 1" (study std1)
    v1: Variables "因变量 1"
    s1: Stationary "稳态求解器 1"
      fc1: FullyCoupled "全耦合 1" | linsolver = d1; initstep = 0.01; minstep = 1.0E-6; maxiter = 50
      d1: Direct "Direct (已合并)"

Datasets
  dset1: Solution | solution = sol1

Plots
  pg1: PlotGroup2D "电势 (ec)" | data = dset1
    surf1: Surface "表面 1" | expr = V
    str1: Streamline "流线 1" on boundaries 1-4 | expr = {ec.Ex, ec.Ey}; udist = 0.02
      col1: Color "颜色表达式 1" | expr = V
      filt1: Filter "过滤器 1" | expr = !isScalingSystemDomain
  pg2: PlotGroup2D "电场模 (ec)" | data = dset1
    surf1: Surface "表面 1" | expr = ec.normE
    str1: Streamline "流线 1" on boundaries 1-4 | expr = {ec.Ex, ec.Ey}; udist = 0.02
      col1: Color "颜色表达式 1" | expr = ec.normE
      filt1: Filter "过滤器 1" | expr = !isScalingSystemDomain
  pg3: PlotGroup2D "温度 (ht)" | data = dset1
    surf1: Surface "表面" | expr = T
  pg4: PlotGroup2D "等温线 (ht)" | data = dset1
    con1: Contour "等值线" | expr = T; levelrounding = off

Exports
  data1: Data "数据 1"
    data = dset1
    expr = T
    filename = C:\Users\Admin\Desktop\Untitled.txt
    location = regulargrid
    regulargridx2 = (-0.5, 0.01, 0.5)
    regulargridy2 = (-0.5, 0.01, 0.5)
  mesh1: Mesh "网格 1" | data = dset1
  data2: Data "数据 2"
    data = dset1
    expr = T
    unit = K
    descr = 温度
    filename = C:\Users\Admin\Desktop\2D\多物理场耦合\热数据集.txt
    location = grid
    gridx2 = range(-0.5,0.010101010101,0.5)
    gridy2 = range(-0.5,0.010101010101,0.5)